*Heading
 Modal Analysis Job
** Job name: Modal_Analysis_Job Model name: PrismTower
** Generated by: Abaqus/CAE 2023
*Preprint, echo=NO, model=NO, history=NO, contact=NO
**
** PARTS
**
*Part, name=PART-1
*Node
      1,  0.371549606,   1.64021337, 9.99999997e-07
      2,  0.565387845,   1.85286713, 9.99999997e-07
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*Element, type=C3D4
 5771, 2267, 3145, 2977, 3310
 5772, 3343, 3429, 2938, 3675
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*Elset, elset=AllElements, generate
  5771,  21298,      1
** Section: WholeSection
*Solid Section, elset=AllElements, material=Material_Masonry
,
*End Part
**
**
** ASSEMBLY
**
*Assembly, name=Assembly
**
*Instance, name=PART-1_Instance, part=PART-1
*End Instance
**
*Nset, nset=BottomExteriorAssembly, instance=PART-1_Instance
    1,    2,    3,    7,    8,    9
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*Nset, nset=XFixedNodesAssembly, instance=PART-1_Instance
  604,  605,  606,  608,  714,  715
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*Nset, nset=YFixedNodesAssembly, instance=PART-1_Instance
  407,  408,  577,  690,  691,  917
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*Nset, nset=ZFixedNodesAssembly, instance=PART-1_Instance
   1,   2,   3,   7,   8,   9
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*End Assembly
**
** MATERIALS
**
*Material, name=Material_Masonry
*Density
2150.,
*Elastic
 1.6e+09, 0.2
**
** BOUNDARY CONDITIONS
**
** Name: FixX Type: Displacement/Rotation
*Boundary
XFixedNodesAssembly, 1, 1
** Name: FixY Type: Displacement/Rotation
*Boundary
YFixedNodesAssembly, 2, 2
** Name: FixZ Type: Displacement/Rotation
*Boundary
ZFixedNodesAssembly, 3, 3
** ----------------------------------------------------------------
**
** STEP: ModalAnalysis
**
*Step, name=ModalAnalysis, nlgeom=NO, perturbation
*Frequency, eigensolver=Lanczos, sim, acoustic coupling=on, normalization=mass
10, , , , ,
**
** OUTPUT REQUESTS
**
*Restart, write, frequency=0
**
** FIELD OUTPUT: F-Output-1
**
*Output, field
*Node Output
U,
*Element Output, directions=YES
EVOL,
**
** HISTORY OUTPUT: H-Output-1
**
*Output, history
*Energy Output
ALLKE, ALLSE
*End Step
